// COMSOL Multiphysics 5.5.0.292 model "APM-ECBS_z-axis.mph"
// Outline of the model tree

Geometry
  geom1 "Geometry 1" (3D, length unit m)
    fin: Finalize "Form Union"

Physics
  mef: ElectricInductionCurrents "Magnetic and Electric Fields" on all domains
    dependent variable A = {Ax, Ay, Az}
    alc1: ElectromagneticModel "Ampère's Law and Current Conservation 1" (default)
    mi1: MagneticInsulation (default)
      ein1: ElectricInsulation (default)
    init1: init "Initial Values 1" (default)
  ge: GlobalEquations "Global ODEs and DAEs"
    ge1: GlobalEquations
      valueType = complex
      DependentVariableQuantity = dimensionless
      CustomDependentVariableUnit = m
      SourceTermQuantity = dimensionless
      CustomSourceTermUnit = m

Mesh
  mesh1 "Mesh 1" (physics-controlled)

Studies
  std1 "Study 1"
    stat: Stationary